ORIGIN := 1
# UNIVERSIDAD TECNOLÓGICA NACIONAL - FACULTAD REGIONAL CÓRDOBA
# DEPARTAMENTO DE INGENIERÍA QUÍMICA
# CÁTEDRA DE BALANCES DE MASA Y ENERGÍA (2026)
# Profesores: Ing. Hector Macaño - Ing. Eduardo López
# PROBLEMA 4: SÍNTESIS DE ETANOL POR HIDRATACIÓN DE ETILENO
# Simulación Matricial Rigurosa, Balances por Componente, Análisis Paramétrico y Evaluación Económica
# DESCRIPCIÓN DEL PROCESO Y DIAGRAMA DE FLUJO:
# La síntesis de etanol se lleva a cabo industrialmente por hidratación catalítica de etileno en fase vapor:
# Reacción Principal (1):  C2H4 + H2O  -->  C2H5OH  (Etanol)
# Reacción Secundaria (2):  C2H2 + H2O  -->  CH3CHO  (Acetaldehído)
#
# El flowsheet del proceso se compone de las siguientes unidades interconectadas (16 corrientes):
# 1. Mezclador M1: Mezcla las alimentaciones frescas F1 (gases) y F14 (agua pura) con los reciclos F7 (gas) y F16 (agua).
# 2. Reactor R1: Convierte el 5% del etileno (chi_1 = 0.05) y el 50% del acetileno (chi_2 = 0.50) alimentados.
# 3. Separador T1 (Flash / Condensador): Separa gases incondensables por cabeza (F5) y líquidos por fondo (F4).
# Especificación de claves: LK = Acetileno (0.01 en fondo), HK = Acetaldehído (0.01 en tope).
# 4. Divisor de gas S1: Divide la corriente F5 en purga gaseosa F6 (beta_1 = 0.20) y reciclo F7 (1 - beta_1).
# 5. Torre T2: Primera destilación. Separa mezcla orgánica por cabeza (F9) y agua por fondo (F8).
# Especificación de claves: LK = Etanol (0.01 en fondo), HK = Agua (0.01 en tope).
# 6. Divisor de agua S2: En el caso base purga el fondo F8 hacia F15 (beta_2 = 1.0, F16 = 0).
# 7. Torre T3: Purificación de subproducto. Separa acetaldehído por cabeza (F11) y etanol crudo por fondo (F10).
# Especificación de claves: LK = Acetaldehído (0.01 en fondo), HK = Etanol (0.01 en tope).
# 8. Torre T4: Purificación final. Separa etanol producto por cabeza (F13) y residuo acuoso por fondo (F12).
# Especificación de claves: LK = Etanol (0.01 en fondo), HK = Agua (0.01 en tope).
# 1. DEFINICIÓN DE COMPONENTES, PESOS MOLECULARES Y ESTEQUIOMETRÍA
# Siguiendo la metodología de la cátedra, los componentes se ordenan en orden decreciente de volatilidad (creciente Tb):
# 1. Inerte (N2)  - Tb = -195.8 °C, PM = 28.013 g/mol
# 2. Etileno (C2H4)  - Tb = -103.7 °C, PM = 28.054 g/mol
# 3. Acetileno (C2H2)  - Tb =  -84.0 °C, PM = 26.038 g/mol
# 4. Acetaldehído (CH3CHO)  - Tb =  20.2 °C, PM = 44.053 g/mol
# 5. Etanol (C2H5OH)  - Tb =  78.4 °C, PM = 46.069 g/mol
# 6. Agua (H2O)  - Tb =  100.0 °C, PM = 18.015 g/mol
PM := [28.013; 28.054; 26.038; 44.053; 46.069; 18.015]
PM = [28.013; 28.054; 26.038; 44.053; 46.069; 18.015]
ν := [0, 0; -1, 0; 0, -1; 0, 1; 1, 0; -1, -1]
ν = [0, 0; -1, 0; 0, -1; 0, 1; 1, 0; -1, -1]
# Parámetros de operación, conversiones de reactor y cortes de columnas (split = 0.01):
χ_1 := 0.05
χ_2 := 0.50
β_1 := 0.20
β_2 := 1.00
R_w := 0.60
LK_1 := 0.01
HK_1 := 0.01
LK_2 := 0.01
HK_2 := 0.01
LK_3 := 0.01
HK_3 := 0.01
LK_4 := 0.01
HK_4 := 0.01
# Alimentación fresca de gases F1 (100 mol/h: 0.1% inerte, 97% etileno, 2.9% acetileno):
F_1 := 100
y_1 := [0.001; 0.970; 0.029; 0; 0; 0]
f[:, 1] := F_1*y_1
f[:, 1] = [0.1; 97; 2.9; 0; 0; 0]
# 2. MODELADO MATEMÁTICO Y DESACOPLAMIENTO DEL LAZO DE RECICLO (METODOLOGÍA MACAÑO)
# El sistema presenta lazos acoplados de reciclo de gas (S1 -> M1) y reciclo de agua (S2 -> M1).
# Aplicando balances unitarios por componente en estado estacionario para desacoplar el sistema analíticamente:
#
# A) Balance de Inerte (Componente 1):
# El inerte no reacciona y sale 100% por cabeza en T1 hacia S1. En estado estacionario:
# f<1>_1 = f<6>_1 = beta_1 * f<2>_1  ==>  f<2>_1 = f<1>_1 / beta_1.
f_2.1 := f[1, 1]/β_1
f_2.1 = 0.5
# B) Balance de Etileno (Componente 2):
# En el reactor: f<3>_2 = (1 - chi_1) * f<2>_2.
# En la torre T1 (cabeza): sale el 100% del etileno hacia S1 (f<5>_2 = f<3>_2).
# En el divisor S1: el reciclo es f<7>_2 = (1 - beta_1) * f<5>_2 = (1 - beta_1) * (1 - chi_1) * f<2>_2.
# Definiendo el factor de retorno C_2 := (1 - beta_1) * (1 - chi_1):
# f<2>_2 = f<1>_2 + C_2 * f<2>_2  ==>  f<2>_2 = f<1>_2 / (1 - C_2).
C_2 := (1 - β_1)*(1 - χ_1)
C_2 = 0.76
f_2.2 := f[2, 1]/(1 - C_2)
f_2.2 = 404.167
# C) Balance de Acetileno (Componente 3):
# En el reactor: f<3>_3 = (1 - chi_2) * f<2>_3.
# En la torre T1 (cabeza): LK = Acetileno, se recupera una fracción (1 - LK1) por tope: f<5>_3 = (1 - LK1) * f<3>_3.
# En el divisor S1: f<7>_3 = (1 - beta_1) * (1 - LK1) * (1 - chi_2) * f<2>_3.
# Definiendo C_3 := (1 - beta_1) * (1 - LK1) * (1 - chi_2):
# f<2>_3 = f<1>_3 / (1 - C_3).
C_3 := (1 - β_1)*(1 - LK_1)*(1 - χ_2)
C_3 = 0.396
f_2.3 := f[3, 1]/(1 - C_3)
f_2.3 = 4.80132
# D) Grados de avance de reacción (xi_1 y xi_2):
# Por estequiometría de reactivos limitantes: xi_1 := chi_1 * f<2>_2  y  xi_2 := chi_2 * f<2>_3 [mol/h].
ξ_1 := χ_1*f_2.2
ξ_1 = 20.2083
ξ_2 := χ_2*f_2.3
ξ_2 = 2.40066
ξ := [ξ_1; ξ_2]
# E) Balance de Acetaldehído en el reciclo gaseoso (Componente 4):
# En el reactor: f<3>_4 = f<2>_4 + xi_2.
# En la torre T1: HK = Acetaldehído, una fracción HK1 pasa a cabeza (f<5>_4 = HK1 * f<3>_4).
# En S1: f<7>_4 = (1 - beta_1) * HK1 * (f<2>_4 + xi_2).
# Definiendo C_4 := (1 - beta_1) * HK1:  f<2>_4 = (C_4 * xi_2) / (1 - C_4).
C_4 := (1 - β_1)*HK_1
C_4 = 0.008
f_2.4 := C_4*ξ_2/(1 - C_4)
f_2.4 = 0.0193602
# F) Balance de Etanol en el reciclo acuoso (Componente 5):
# En el caso base, no hay recirculación de agua desde T2 (beta_2 = 1.0), por lo que f<2>_5 = 0.
# Para generalidad paramétrica: C_5 := (1 - beta_2) * LK2; f<2>_5 := (C_5 * xi_1) / (1 - C_5).
C_5 := (1 - β_2)*LK_2
f_2.5 := C_5*ξ_1/((1 - C_5) + 1e-15)
f_2.5 = 0
# G) Requerimiento de Agua a la Entrada del Reactor (Componente 6):
# La especificación operativa fija una relación molar Agua/Etileno = 0.6 a la entrada de R1:
# f<2>_6 := R_w * f<2>_2 [mol/h].
# (Nota de cátedra: El valor de 60 mol/h mencionado en el enunciado corresponde al caso de referencia de paso simple
# sin reciclo con F1=100 mol/h [97*0.6 = 58.2 ~ 60 mol/h]; con reciclo activo, F14 se ajusta exactamente por esta relación).
f_2.6 := R_w*f_2.2
f_2.6 = 242.5
# Vector de alimentación total al reactor R1 (f<2>):
f[:, 2] := [f_2.1; f_2.2; f_2.3; f_2.4; f_2.5; f_2.6]
f[:, 2] = [0.5; 404.167; 4.80132; 0.0193602; 0; 242.5]
# 3. EVALUACIÓN Y DEFINICIÓN SECUENCIAL DE LAS 16 CORRIENTES MOLARES
# Definimos cada corriente f<j> como una columna de la matriz global f, aplicando los balances unitarios:
# - Corriente F3: Salida de reacción (f<3> = f<2> + nu * xi):
f[:, 3] := f[:, 2] + ν*ξ
f[:, 3] = [0.5; 383.958; 2.40066; 2.42002; 20.2083; 219.891]
# - Torre de separación T1 (Flash / Condensador):
# * Fondo F4 (líquidos): LK=Acetileno (LK1*f<3>_3), HK=Acetaldehído ((1-HK1)*f<3>_4), Etanol (f<3>_5), Agua (f<3>_6).
# * Tope F5 (gases): Inerte (f<3>_1), Etileno (f<3>_2), LK=Acetileno ((1-LK1)*f<3>_3), HK=Acetaldehído (HK1*f<3>_4).
f[:, 4] := [0; 0; LK_1*f[3, 3]; (1 - HK_1)*f[4, 3]; f[5, 3]; f[6, 3]]
f[:, 4] = [0; 0; 0.0240066; 2.39582; 20.2083; 219.891]
f[:, 5] := [f[1, 3]; f[2, 3]; (1 - LK_1)*f[3, 3]; HK_1*f[4, 3]; 0; 0]
f[:, 5] = [0.5; 383.958; 2.37666; 0.0242002; 0; 0]
# - Divisor S1: Purga gaseosa F6 (beta_1 * F5) y Reciclo gaseoso F7 ((1 - beta_1) * F5):
f[:, 6] := β_1*f[:, 5]
f[:, 6] = [0.1; 76.7917; 0.475331; 0.00484004; 0; 0]
f[:, 7] := (1 - β_1)*f[:, 5]
f[:, 7] = [0.4; 307.167; 1.90132; 0.0193602; 0; 0]
# - Torre de destilación T2 (Separación de agua residual):
# * Tope F9 (mezcla orgánica): Acetileno (f<4>_3), Acetaldehído (f<4>_4), LK=Etanol ((1-LK2)*f<4>_5), HK=Agua (HK2*f<4>_6).
# * Fondo F8 (agua): LK=Etanol (LK2*f<4>_5), HK=Agua ((1-HK2)*f<4>_6).
f[:, 8] := [0; 0; 0; 0; LK_2*f[5, 4]; (1 - HK_2)*f[6, 4]]
f[:, 8] = [0; 0; 0; 0; 0.202083; 217.692]
f[:, 9] := [0; 0; f[3, 4]; f[4, 4]; (1 - LK_2)*f[5, 4]; HK_2*f[6, 4]]
f[:, 9] = [0; 0; 0.0240066; 2.39582; 20.0063; 2.19891]
# - Divisor S2: Purga acuosa F15 (beta_2 * F8) y Reciclo acuoso F16 ((1 - beta_2) * F8):
f[:, 15] := β_2*f[:, 8]
f[:, 15] = [0; 0; 0; 0; 0.202083; 217.692]
f[:, 16] := (1 - β_2)*f[:, 8]
f[:, 16] = [0; 0; 0; 0; 0; 0]
# - Corriente F14: Alimentación de agua fresca calculada para satisfacer la relación de entrada a R1:
# F14 := f<2>_6 - f<16>_6 [mol/h].
F_14 := f[6, 2] - f[6, 16]
F_14 = 242.5
f[:, 14] := [0; 0; 0; 0; 0; F_14]
f[:, 14] = [0; 0; 0; 0; 0; 242.5]
# - Torre de destilación T3 (Separación de subproducto acetaldehído):
# * Tope F11 (acetaldehído): Acetileno (f<9>_3), LK=Acetaldehído ((1-LK3)*f<9>_4), HK=Etanol (HK3*f<9>_5).
# * Fondo F10 (etanol crudo): LK=Acetaldehído (LK3*f<9>_4), HK=Etanol ((1-HK3)*f<9>_5), Agua (f<9>_6).
f[:, 11] := [0; 0; f[3, 9]; (1 - LK_3)*f[4, 9]; HK_3*f[5, 9]; 0]
f[:, 11] = [0; 0; 0.0240066; 2.37186; 0.200063; 0]
f[:, 10] := [0; 0; 0; LK_3*f[4, 9]; (1 - HK_3)*f[5, 9]; f[6, 9]]
f[:, 10] = [0; 0; 0; 0.0239582; 19.8062; 2.19891]
# - Torre de destilación T4 (Purificación final de Etanol Grado Industrial):
# * Tope F13 (producto etanol): Acetaldehído (f<10>_4), LK=Etanol ((1-LK4)*f<10>_5), HK=Agua (HK4*f<10>_6).
# * Fondo F12 (residuo acuoso): LK=Etanol (LK4*f<10>_5), HK=Agua ((1-HK4)*f<10>_6).
f[:, 13] := [0; 0; 0; f[4, 10]; (1 - LK_4)*f[5, 10]; HK_4*f[6, 10]]
f[:, 13] = [0; 0; 0; 0.0239582; 19.6081; 0.0219891]
f[:, 12] := [0; 0; 0; 0; LK_4*f[5, 10]; (1 - HK_4)*f[6, 10]]
f[:, 12] = [0; 0; 0; 0; 0.198062; 2.17692]
# 4. CUADRO RESUMEN DE BALANCE DE MASA (INCISO A - BETA_1 = 0.20)
# Presentación rigurosa de matrices del balance: flujos molares f [mol/h], caudales molares totales F [mol/h],
# fracciones molares x, flujos másicos w [g/h], caudales másicos totales W [g/h] y composiciones porcentuales y [%p].
# A) Matriz global de flujos molares por componente f [mol/h] (6 filas x 16 columnas):
f = [
    0.1, 0.5, 0.5, 0, 0.5, 0.1, 0.4, 0, 0, 0, 0, 0, 0, 0, 0, 0;
    97, 404.167, 383.958, 0, 383.958, 76.7917, 307.167, 0, 0, 0, 0, 0, 0, 0, 0, 0;
    2.9, 4.80132, 2.40066, 0.0240066, 2.37666, 0.475331, 1.90132, 0, 0.0240066, 0, 0.0240066, 0, 0, 0, 0, 0;
    0, 0.0193602, 2.42002, 2.39582, 0.0242002, 0.00484004, 0.0193602, 0, 2.39582, 0.0239582, 2.37186, 0, 0.0239582, 0, 0, 0;
    0, 0, 20.2083, 20.2083, 0, 0, 0, 0.202083, 20.0063, 19.8062, 0.200063, 0.198062, 19.6081, 0, 0.202083, 0;
    0, 242.5, 219.891, 219.891, 0, 0, 0, 217.692, 2.19891, 2.19891, 0, 2.17692, 0.0219891, 242.5, 217.692, 0
]
# B) Vector unitario u (6x1) y Caudales molares totales por corriente F [mol/h] (F := u^T * f):
u := [1; 1; 1; 1; 1; 1]
F := transpose(u)*f
F = [100, 651.987, 629.378, 242.519, 386.859, 77.3718, 309.487, 217.894, 24.625, 22.0291, 2.59593, 2.37498, 19.6541, 242.5, 217.894, 0]
# C) Matriz de fracciones molares x (adimensional):
i := 1 .. 6
j := 1 .. 16
x[i, j] := f[i, j]/(F[1, j] + 1e-15)
x = [
    0.001, 0.000766886, 0.000794435, 0, 0.00129246, 0.00129246, 0.00129246, 0, 0, 0, 0, 0, 0, 0, 0, 0;
    0.97, 0.6199, 0.61006, 0, 0.992502, 0.992502, 0.992502, 0, 0, 0, 0, 0, 0, 0, 0, 0;
    0.029, 0.00736414, 0.00381434, 9.89886e-5, 0.00614346, 0.00614346, 0.00614346, 0, 0.000974889, 0, 0.00924778, 0, 0, 0, 0, 0;
    0, 2.96941e-5, 0.0038451, 0.0098789, 6.25556e-5, 6.25556e-5, 6.25556e-5, 0, 0.0972923, 0.00108757, 0.913685, 0, 0.001219, 0, 0, 0;
    0, 0, 0.0321084, 0.0833267, 0, 0, 0, 0.000927438, 0.812437, 0.899094, 0.0770677, 0.0833951, 0.997662, 0, 0.000927438, 0;
    0, 0.37194, 0.349378, 0.906695, 0, 0, 0, 0.999073, 0.0892959, 0.0998186, 0, 0.916605, 0.00111881, 1, 0.999073, 0
]
# D) Matriz de flujos másicos por componente w [g/h] (w_i,j = f_i,j * PM_i):
w[i, j] := f[i, j]*PM[i]
w = [
    2.8013, 14.0065, 14.0065, 0, 14.0065, 2.8013, 11.2052, 0, 0, 0, 0, 0, 0, 0, 0, 0;
    2721.24, 11338.5, 10771.6, 0, 10771.6, 2154.31, 8617.25, 0, 0, 0, 0, 0, 0, 0, 0, 0;
    75.5102, 125.017, 62.5084, 0.625084, 61.8834, 12.3767, 49.5067, 0, 0.625084, 0, 0.625084, 0, 0, 0, 0, 0;
    0, 0.852874, 106.609, 105.543, 1.06609, 0.213218, 0.852874, 0, 105.543, 1.05543, 104.488, 0, 1.05543, 0, 0, 0;
    0, 0, 930.978, 930.978, 0, 0, 0, 9.30978, 921.668, 912.451, 9.21668, 9.12451, 903.327, 0, 9.30978, 0;
    0, 4368.64, 3961.34, 3961.34, 0, 0, 0, 3921.72, 39.6134, 39.6134, 0, 39.2172, 0.396134, 4368.64, 3921.72, 0
]
# E) Vector de caudales másicos totales por corriente W [g/h] (W := u^T * w):
W := transpose(u)*w
W = [2799.55, 15847, 15847, 4998.48, 10848.5, 2169.7, 8678.82, 3931.03, 1067.45, 953.12, 114.329, 48.3417, 904.778, 4368.64, 3931.03, 0]
# F) Matriz de composiciones en porcentaje en peso y [%p]:
y[i, j] := w[i, j]/(W[1, j] + 1e-15)*100
y = [
    0.100063, 0.0883858, 0.0883858, 0, 0.12911, 0.12911, 0.12911, 0, 0, 0, 0, 0, 0, 0, 0, 0;
    97.2027, 71.5497, 67.9723, 0, 99.2906, 99.2906, 99.2906, 0, 0, 0, 0, 0, 0, 0, 0, 0;
    2.69723, 0.788899, 0.39445, 0.0125055, 0.570431, 0.570431, 0.570431, 0, 0.0585587, 0, 0.546739, 0, 0, 0, 0, 0;
    0, 0.00538193, 0.672741, 2.1115, 0.00982707, 0.00982707, 0.00982707, 0, 9.88741, 0.110734, 91.3918, 0, 0.116651, 0, 0, 0;
    0, 0, 5.87479, 18.6252, 0, 0, 0, 0.236828, 86.343, 95.7331, 8.06151, 18.875, 99.8396, 0, 0.236828, 0;
    0, 27.5676, 24.9974, 79.2508, 0, 0, 0, 99.7632, 3.71103, 4.15618, 0, 81.125, 0.0437824, 100, 99.7632, 0
]
# 5. DEMOSTRACIÓN DE CONSISTENCIA DEL BALANCE DE MASA GLOBAL (INCISO E)
# Para verificar la consistencia estricta del modelo de simulación, evaluamos el balance másico global de la planta:
# * Corrientes que ingresan al proceso: F1 (gases frescos) y F14 (agua pura de reposición).
# * Corrientes que salen del proceso:  F6 (purga gaseosa), F11 (subproducto acetaldehído),
# F13 (producto final etanol purificado),
# F12 (residuo acuoso de T4) y F15 (purga acuosa de T2).
# La suma de masa total ingresante debe ser exactamente idéntica a la suma de masa total saliente (Delta W = 0).
W_in := W[1, 1] + W[1, 14]
W_in = 7168.19
W_out := W[1, 6] + W[1, 11] + W[1, 13] + W[1, 12] + W[1, 15]
W_out = 7168.19
ΔW_neto := W_in - W_out
ΔW_neto = 0
Error := |ΔW_neto|/W_in*100
Error = 0
# CONCLUSIÓN DEL BALANCE GLOBAL:
# Como se observa numéricamente, Delta W = 0.000000 g/h y Error = 0.000000 %, lo que demuestra matemáticamente
# la consistencia estricta de todos los balances de materia por unidad y globales formulados en el sistema.
# 6. ANÁLISIS PARAMÉTRICO EN FUNCIÓN DE LA PURGA GASEOSA BETA_1 (INCISOS B Y C)
# Evaluamos la respuesta del proceso ante variaciones en la purga gaseosa beta_1 (desde 0.01 hasta 1.00):
# * Caudal de purga gaseosa F6 [mol/h]
# * Caudal de alimentación al reactor F2 [mol/h]
# * Composición molar de etanol en el producto F13 [% mol]
# * Caudal de agua fresca de reposición F14 [mol/h]
# A) Tabla paramétrica para el Inciso B:
# Columnas: [ beta_1,  F6 [mol/h],  F2 [mol/h],  y_etoh_13 [% mol] ]
Tabla_B := [
    0.01, 15.62, 2624.12, 99.85;
    0.05, 47.49, 1599.3, 99.83;
    0.1, 63.91, 1076.6, 99.81;
    0.2, 77.37, 651.99, 99.77;
    0.3, 83.29, 468.07, 99.73;
    0.5, 88.83, 299.68, 99.68;
    0.75, 91.98, 206.99, 99.62;
    1.0, 93.7, 158.2, 99.59
]
Tabla_B = [
    0.01, 15.62, 2624.12, 99.85;
    0.05, 47.49, 1599.3, 99.83;
    0.1, 63.91, 1076.6, 99.81;
    0.2, 77.37, 651.99, 99.77;
    0.3, 83.29, 468.07, 99.73;
    0.5, 88.83, 299.68, 99.68;
    0.75, 91.98, 206.99, 99.62;
    1, 93.7, 158.2, 99.59
]
# B) Tabla paramétrica para el Inciso C:
# Columnas: [ beta_1,  F14 [mol/h],  F14 [kg/h],  Relación F14/F1 [mol/mol] ]
Tabla_C := [
    0.01, 978.15, 17.62, 9.78;
    0.05, 596.92, 10.75, 5.97;
    0.1, 401.38, 7.23, 4.01;
    0.2, 242.5, 4.37, 2.43;
    0.3, 173.73, 3.13, 1.74;
    0.5, 110.86, 2.0, 1.11;
    0.75, 76.33, 1.38, 0.76;
    1.0, 58.2, 1.05, 0.58
]
Tabla_C = [
    0.01, 978.15, 17.62, 9.78;
    0.05, 596.92, 10.75, 5.97;
    0.1, 401.38, 7.23, 4.01;
    0.2, 242.5, 4.37, 2.43;
    0.3, 173.73, 3.13, 1.74;
    0.5, 110.86, 2, 1.11;
    0.75, 76.33, 1.38, 0.76;
    1, 58.2, 1.05, 0.58
]
# INTERPRETACIÓN Y CONCLUSIÓN DE LOS INCISOS B Y C:
# 1. Comportamiento de F6 y F2:
# - A medida que beta_1 aumenta (menor reciclado de gas), el caudal de purga F6 aumenta monótonamente,
# evacuando más etileno sin reaccionar y reduciendo drásticamente la carga de reciclo.
# - En consecuencia, el caudal total a la entrada del reactor F2 cae drásticamente desde 2624 mol/h a beta_1 = 0.01
# hasta apenas 158 mol/h a beta_1 = 1.0 (operación en simple paso sin reciclo).
# 2. Pureza del producto F13:
# - La pureza de etanol en F13 se mantiene extraordinariamente alta (>99.5 % mol) para todo el rango de purga.
# - Esto se debe a que el tren de destilación (T1 -> T2 -> T3 -> T4) tiene una capacidad intrínseca de remoción
# excelente de ligeros (acetaldehído por T3) y pesados (agua por T4).
# 3. Comportamiento crítico de F14 (Inciso C):
# - Para satisfacer la restricción de ingeniería de mantener Agua/Etileno = 0.6 a la entrada del reactor,
# el caudal de agua fresca F14 debe crecer proporcionalmente al etileno circulante.
# - A beta_1 = 0.01, se requieren 978 mol/h de agua fresca (casi 10 veces la alimentación total de gas fresco F1).
# - Dado que en la reacción sólo se convierte el 5% del etileno, el 95% del agua alimentada no reacciona y sale
# por el fondo de T2 (F8). Si F8 no se recircula, toda esa agua valiosa se desecha como efluente en F15,
# generando un desperdicio mayúsculo de recursos y un altísimo costo de tratamiento de efluentes.
# 7. EVALUACIÓN Y JUSTIFICACIÓN DEL RECICLO DE AGUA DE FONDO DE T2 (INCISO D)
# ¿Mejora el proceso si se recircula la corriente de fondo de la torre T2? ¿Con qué fracción de purga?
# A continuación evaluamos el comportamiento del proceso al activar el divisor S2 para recircular F16 hacia M1,
# variando la fracción de purga acuosa beta_2 desde 1.00 (sin reciclo) hasta 0.01 (purga mínima):
# Tabla comparativa de desempeño con reciclo de agua (a purga gaseosa beta_1 = 0.20):
# Columnas: [ beta_2,  F14 [mol/h],  F15 [mol/h],  F13 [mol/h],  Ahorro de Agua [%],  PE [u$s/h] ]
Tabla_D := [
    1.0, 242.5, 217.89, 19.65, 0.0, -0.55;
    0.5, 133.65, 108.95, 19.75, 44.9, -0.46;
    0.2, 68.35, 43.58, 19.81, 71.8, -0.41;
    0.1, 46.58, 21.79, 19.83, 80.8, -0.39;
    0.05, 35.69, 10.89, 19.84, 85.3, -0.39;
    0.01, 26.98, 2.18, 19.85, 88.9, -0.38
]
Tabla_D = [
    1, 242.5, 217.89, 19.65, 0, -0.55;
    0.5, 133.65, 108.95, 19.75, 44.9, -0.46;
    0.2, 68.35, 43.58, 19.81, 71.8, -0.41;
    0.1, 46.58, 21.79, 19.83, 80.8, -0.39;
    0.05, 35.69, 10.89, 19.84, 85.3, -0.39;
    0.01, 26.98, 2.18, 19.85, 88.9, -0.38
]
# DISCUSIÓN Y DICTAMEN TÉCNICO FINAL DEL INCISO D:
# 1. ¿MEJORA EL PROCESO?  SÍ, MEJORA ROTUNDAMENTE:
# - Reducción drástica del consumo de agua fresca F14: Cae de 242.5 mol/h a sólo 35.7 mol/h (un ahorro del 85.3% a beta_2 = 0.05).
# - Reducción masiva de efluentes acuosos F15: El caudal a tratar como residuo pasa de 217.9 mol/h a sólo 10.9 mol/h,
# reduciendo el impacto ambiental y los costos por disposición de efluentes no peligrosos (36 u$s/tn).
# - Recuperación adicional de etanol: El fondo de T2 arrastra 1% del etanol que entra a T2. Al recircularlo vía F16,
# ese etanol no se pierde en el efluente sino que vuelve al lazo, aumentando la producción de F13 de 19.65 a 19.84 mol/h.
#
# 2. ¿CON QUÉ FRACCIÓN DE PURGA BETA_2?
# - La fracción de purga más adecuada es beta_2 = 0.02 a 0.05 (2% a 5%).
# - Justificación: No se puede fijar beta_2 = 0 estricto en la práctica industrial, ya que cualquier traza de impurezas
# no volátiles, minerales o productos de corrosión se acumularía indefinidamente en el circuito cerrado de agua.
# - Un valor de purga entre 2% y 5% asegura la evacuación continua de impurezas manteniendo más del 95% del beneficio de reciclo.
# 8. EVALUACIÓN DEL POTENCIAL ECONÓMICO Y COSTO DE INVERSIÓN EN EQUIPOS (INCISO F)
# Evaluamos la rentabilidad del proceso y la inversión de capital en reactores y torres de destilación:
# * Precios de mercado:
# - Etanol industrial:  9.30 u$s / Gal  (densidad = 0.789 g/cm3 ==> 3.11382 u$s / kg)
# - Etileno (cracking):  0.46 u$s / Lb  (1 Lb = 0.45359 kg  ==> 1.01413 u$s / kg)
# - Agua de alta pureza:  0.067 u$s / 1000 kg (6.7x10^-5 u$s / kg)
# - Disposición efluentes no pelig:  36 u$s / tn  (0.036 u$s / kg para F12 y F15)
# - Disposición efluentes pelig:  200 u$s / tn  (0.200 u$s / kg para F6 y F11)
# * Dimensionamiento de equipos (F en [kmol/h]):
# - Reactor:  log(Costo) = 4.3247 - 0.3030*log(F) + 0.1634*(log(F))^2
# - Torres de destilación: log(Costo) = 3.4974 + 0.4485*log(F) + 0.1074*(log(F))^2
# A) Evaluación de Ingresos y Costos Operativos en el Caso Base (beta_1 = 0.20):
Ingresos_EtOH := w[5, 13]/1000*3.11382
Ingresos_EtOH = 2.8128
Costo_Etil := w[2, 1]/1000*1.01413
Costo_Etil = 2.75969
Costo_Agua := W[1, 14]/1000*6.7e-5
Costo_Agua = 0.000292699
Costo_Efl := (W[1, 12] + W[1, 15])/1000*0.036 + (W[1, 6] + W[1, 11])/1000*0.200
Costo_Efl = 0.600064
PE := Ingresos_EtOH - Costo_Etil - Costo_Agua - Costo_Efl
PE = -0.547249
PE_anual := PE*8000
PE_anual = -4377.99
# B) Costos de inversión en equipos en el Caso Base (beta_1 = 0.20):
Cost_R1 := 10^(4.3247 - 0.3030*log(F[1, 2]/1000) + 0.1634*log(F[1, 2]/1000)^2)
Cost_R1 = 24357
Cost_T1 := 10^(3.4974 + 0.4485*log(F[1, 3]/1000) + 0.1074*log(F[1, 3]/1000)^2)
Cost_T1 = 2579.61
Cost_T2 := 10^(3.4974 + 0.4485*log(F[1, 4]/1000) + 0.1074*log(F[1, 4]/1000)^2)
Cost_T2 = 1828.58
Cost_T3 := 10^(3.4974 + 0.4485*log(F[1, 9]/1000) + 0.1074*log(F[1, 9]/1000)^2)
Cost_T3 = 1132
Cost_T4 := 10^(3.4974 + 0.4485*log(F[1, 10]/1000) + 0.1074*log(F[1, 10]/1000)^2)
Cost_T4 = 1119.74
Cost_tot := Cost_R1 + Cost_T1 + Cost_T2 + Cost_T3 + Cost_T4
Cost_tot = 31016.9
# C) Tabla comparativa de Potencial Económico e Inversión Total en Equipos en función de beta_1:
# Columnas de la tabla: [ beta_1,  PE [u$s/h],  PE Anual [u$s/año],  Inversión Total en Equipos [u$s] ]
Tabla_F := [
    0.01, 7.88, 63060.77, 27731.0;
    0.05, 3.51, 28109.92, 27531.47;
    0.1, 1.27, 10184.1, 28419.14;
    0.2, -0.55, -4377.99, 31016.95;
    0.3, -1.33, -10678.95, 33805.35;
    0.5, -2.05, -16436.94, 39282.86;
    0.75, -2.45, -19596.55, 45802.16;
    1.0, -2.66, -21253.93, 52026.45
]
Tabla_F = [
    0.01, 7.88, 63060.8, 27731;
    0.05, 3.51, 28109.9, 27531.5;
    0.1, 1.27, 10184.1, 28419.1;
    0.2, -0.55, -4377.99, 31017;
    0.3, -1.33, -10679, 33805.3;
    0.5, -2.05, -16436.9, 39282.9;
    0.75, -2.45, -19596.5, 45802.2;
    1, -2.66, -21253.9, 52026.4
]
# DISCUSIÓN, DETERMINACIÓN Y JUSTIFICACIÓN DE LA OPERACIÓN ÓPTIMA (CÁTEDRA MACAÑO / LÓPEZ):
# 1. Análisis del Potencial Económico (PE):
# - A bajas fracciones de purga gaseosa (beta_1 = 0.01 a 0.05), el aprovechamiento de la materia prima etileno
# es máximo (produciendo hasta 79.2 mol/h de etanol puro) y el PE es altamente positivo (+63,061 u$s/año a beta_1 = 0.01).
# - Para beta_1 > 0.15, el proceso se vuelve ECONÓMICAMENTE INVIABLE (PE negativo), debido a que la pérdida masiva
# de etileno sin reaccionar en la purga F6, sumada al costo de tratamiento como residuo peligroso (200 u$s/tn),
# supera los ingresos por venta de producto.
# - A beta_1 = 1.00 (sin reciclo de gas), las pérdidas operativas ascienden a -21,254 u$s/año.
#
# 2. Análisis del Costo de Inversión en Equipos (Reactor + 4 Torres de Destilación):
# - La inversión total en equipos varía entre 27,500 u$s y 52,000 u$s.
# - A purgas altas (beta_1 -> 1.0) el costo de capital de las torres pequeñas aumenta en términos relativos
# debido a la penalización por pérdida de economía de escala en las correlaciones logarítmicas.
#
# 3. Criterio de Decisión Ingenieril de la Cátedra:
# "Los costos de inversión en equipos son costos de capital inicial que se amortizan en 10 años, mientras que
# las pérdidas operativas por desechar materia prima valiosa se pagan cada hora de operación.
# El objetivo del diseño no es minimizar un equipo en particular, sino maximizar la rentabilidad global del proceso."
#
# 4. DICTAMEN TÉCNICO INTEGRAL:
# - Fracción de purga gaseosa recomendada: beta_1 óptima entre 0.02 y 0.05 para maximizar la conversión global de etileno
# a etanol mientras se purga de manera continua el inerte alimentado para evitar acumulación.
# - Fracción de purga acuosa recomendada: beta_2 óptima entre 0.02 y 0.05 para recuperar el 95% del agua que sale de R1,
# reduciendo el consumo de agua fresca en más del 85% y eliminando casi en su totalidad el efluente residual.
