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# etanol C2H5OH
# etileno C2H4
# acetileno C2H2
# agua H2O
# acetaldehido CH3CHO
ORIGIN := 1!
PM := [28.013; 28.054; 26.038; 44.053; 46.069; 18.015]
T_b := [77.35; 169.47; 189.15; 293.55; 351.44; 373.15]
su := ["nitrogeno N2"; "etileno, C2H4"; "acetileno, C2H2"; "acetaldehido, CH3CHO"; "etanol, C2H5OH"; "agua, H20"]
N_c := 6
N_s := 16
g_inic(x, y) := 1
f := matrix(N_c, N_s, g_inic) = [
    1, 1, 1, 1, 1, 1, 1, 1, 1, 1, 1, 1, 1, 1, 1, 1;
    1, 1, 1, 1, 1, 1, 1, 1, 1, 1, 1, 1, 1, 1, 1, 1;
    1, 1, 1, 1, 1, 1, 1, 1, 1, 1, 1, 1, 1, 1, 1, 1;
    1, 1, 1, 1, 1, 1, 1, 1, 1, 1, 1, 1, 1, 1, 1, 1;
    1, 1, 1, 1, 1, 1, 1, 1, 1, 1, 1, 1, 1, 1, 1, 1;
    1, 1, 1, 1, 1, 1, 1, 1, 1, 1, 1, 1, 1, 1, 1, 1
]
F_1 := 100
x_1 := [0.001; 0.97; 0.029; 0; 0; 0]
f[:, 1] := F_1*x_1
X_1 := 0.05
ε := [10; 10]
ν := [0, 0; -1, 0; 0, -1; 0, 1; 1, 0; -1, -1]
β_1 := 0.2
X_2 := 0.5
F_14 := 60
x_14 := [0; 0; 0; 0; 0; 1]
f[:, 14] := F_14*x_14
HK := 0.01
LK := 0.01
ff := f = [
    0.1, 1, 1, 1, 1, 1, 1, 1, 1, 1, 1, 1, 1, 0, 1, 1;
    97, 1, 1, 1, 1, 1, 1, 1, 1, 1, 1, 1, 1, 0, 1, 1;
    2.9, 1, 1, 1, 1, 1, 1, 1, 1, 1, 1, 1, 1, 0, 1, 1;
    0, 1, 1, 1, 1, 1, 1, 1, 1, 1, 1, 1, 1, 0, 1, 1;
    0, 1, 1, 1, 1, 1, 1, 1, 1, 1, 1, 1, 1, 0, 1, 1;
    0, 1, 1, 1, 1, 1, 1, 1, 1, 1, 1, 1, 1, 60, 1, 1
]
β_2 := 0.8
# Mezclador
Given
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f[:, 2] == ff[:, 1] + ff[:, 14] + f[:, 7] + f[:, 16]
f[6, 2] == f[2, 2]*0.6
# Reactor-1
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f[:, 3] == f[:, 2] + ν*ε
X_1 == (f[2, 2] - f[2, 3])/f[2, 2]
X_2 == (f[3, 2] - f[3, 3])/f[3, 2]
# Torre de destilacion-1
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f[:, 3] == f[:, 5] + f[:, 4]
0 == f[1, 4]
0 == f[2, 4]
f[3, 4] == LK*f[3, 3]
f[4, 5] == HK*f[4, 3]
0 == f[5, 5]
0 == f[6, 5]
# Torre de destilacion-2
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f[:, 4] == f[:, 9] + f[:, 8]
0 == f[1, 8]
0 == f[2, 8]
0 == f[3, 8]
0 == f[4, 8]
f[5, 8] == LK*f[5, 4]
f[6, 9] == HK*f[6, 4]
# Torre de destilacion-3
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f[:, 9] == f[:, 11] + f[:, 10]
0 == f[1, 10]
0 == f[2, 10]
0 == f[3, 10]
f[4, 10] == LK*f[4, 9]
f[5, 11] == HK*f[5, 9]
0 == f[6, 11]
# Torre de destilacion-4
f[:, 10] == f[:, 13] + f[:, 12]
0 == f[1, 12]
0 == f[2, 12]
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0 == f[3, 12]
0 == f[4, 12]
f[5, 12] == LK*f[5, 10]
f[6, 13] == HK*f[6, 10]
# Divisor-1
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f[:, 5] == f[:, 6] + f[:, 7]
f[:, 6] == f[:, 5]*β_1
# Divisor-2
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f[:, 8] == f[:, 15] + f[:, 16]
[f(β_1, β_2); ε(β_1, β_2)] := Find(f, ε)
f[:, 15] == f[:, 8]*β_2
f(β_1, β_2) = [
    0.1, 1, 1, 0, 1, 0.2, 0.8, 0, 0, 0, 0, 0, 0, 0, -0.1, 0.1;
    97, 1.05263, 1, 0, 1, 0.2, 0.8, 0, 0, 0, 0, 0, 0, 0, 96.7474, -96.7474;
    2.9, 1.8914, 0.945701, 0.00945701, 0.936244, 0.187249, 0.748995, 0, 0.00945701, 0, 0.00945701, 0, 0, 0, 1.75759, -1.75759;
    0, -1.00044, -0.0547371, -0.0541898, -0.000547371, -0.000109474, -0.000437897, 0, -0.0541898, -0.000541898, -0.0536479, 0, -0.000541898, 0, 1, -1;
    0, -1.00957, -0.956938, -0.956938, 0, 0, 0, -0.00956938, -0.947368, -0.937895, -0.00947368, -0.00937895, -0.928516, 0, 1, -1.00957;
    0, 0.631579, -0.366753, -0.366753, 0, 0, 0, -0.363086, -0.00366753, -0.00366753, 0, -0.00363086, -3.66753e-5, 60, 59.0053, -59.3684
]
[f(β_1, β_2); ε(β_1, β_2)] := Find(f, ε)
f(β_1, β_2) =  # error: This variable is undefined.
C_R := 10^(4.3247 + (-0.3030*log(f[:, 2])) + 0.1634*log(f[:, 2])^2)
C_T(j) := 10^(3.4974 + 0.4485*log(f(β_1, β_2)[:, j]) + 0.1074*log(f(β_1, β_2)[:, j])^2)
C_T1 := C_T(3)
W(i) := vectorize(PM*f[:, i])  # kg/h
C_T2 := C_T(4)
C_T3 := C_T(9)
C_T4 := C_T(10)
W(1) =  # error
